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/BATCH
/COM,ANSYS RELEASE Release 19.0      BUILD 19.0      UP20171214       22:32:18
/input,menust,tmp,''
/GST,ON
/PLO,INFO,3
/GRO,CURL,ON
/CPLANE,1
WPSTYLE,,,,,,,,0
/prep7
et,1,beam188
keyopt,1,3,3
mp,ex,1,2.1e5
mp,nuxy,1,0.3
sectype,1,beam,rect
secdata,30,10
sectype,2,beam,csolid
secdata,10
n,1,-2000
n,2,
n,3,
n,4,,2000
n,5,2000
n,6,-1000
n,7,1000
e,1,6
e,6,2
e,2,7
e,7,5
secnum,2
e,3,4
cp,1,ux,2,3
cp,2,uy,2,3
cp,3,uz,2,3
cp,4,rotx,2,3
cp,5,roty,2,3
finish
/solv
d,1,all
d,5,all
d,4,ux,,
d,4,uy,,
f,6,fy,-1000
f,7,fy,-1000
solv
finish
/post1
prnsol,u,sum
/eshape,1
plnsol,u,y
etable,mi,smisc,3
etable,mj,smisc,16
etable,refl
/title,bending moment diagram
plls,mi,mj,0.8,0
FINISH
! /EXIT,ALL
